<?xml version="1.0"?>

<!--
  File:     IO360.xml
  Author:   AeromatiC++ v 3.3.1

  See: http://wiki.flightgear.org/JSBSim_Engines#FGPiston

  Inputs:
    name:           IO360
    type:           Piston Engine
    power:          200 hp
-->

<piston_engine name="IO360">
  <minmp unit="INHG">         10.0 </minmp>
  <maxmp unit="INHG">         28.5 </maxmp>
    <displacement unit="IN3"> 380 </displacement>
  <maxhp>        200 </maxhp>
  <cycles>         4.0 </cycles>
  <idlerpm>      700.0 </idlerpm>
  <maxrpm>      2800.0 </maxrpm>
  <sparkfaildrop>  0.1 </sparkfaildrop>
  <volumetric-efficiency> 0.85 </volumetric-efficiency>
  <man-press-lag> 0.1 </man-press-lag>
  <static-friction  unit="HP"> 1 </static-friction>
  <starter-torque> 160 </starter-torque>
  <starter-rpm> 1400 </starter-rpm>
 <!-- Defining <bsfc> over-rides the built-in horsepower calculations -->
 <!--<bsfc>           0.45 </bsfc>-->
  <stroke unit="IN">  4.375 </stroke>
  <bore unit="IN">    5.125 </bore>
  <cylinders>         4  </cylinders>
  <compression-ratio>  8.0 </compression-ratio>
</piston_engine>
